*Heading
** Job name: ThermalAnalysis Model name: HT20_1
** Generated by: Abaqus/CAE 2023
*Preprint, echo=NO, model=NO, history=NO, contact=NO
**
** PARTS
**
*Part, name=PPSPLATE
*End Part
**
**
** ASSEMBLY
**
*Assembly, name=Assembly
**
*Instance, name=PPSPLATE-1, part=PPSPLATE
*Node
      1,  0.126900002,  0.126900002,           0.
      2,  0.126900002,      0.12455,           0.
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*Element, type=DC3D8
    1,  3026,  3027,  3082,  3081,     1,     2,    57,    56
    2,  3027,  3028,  3083,  3082,     2,     3,    58,    57
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*Nset, nset=_PickedSet2, internal, generate
     1,  15125,      1
*Elset, elset=_PickedSet2, internal, generate
     1,  11664,      1
*Orientation, name=Ori-1, system=user
** Section: HTSEC
*Solid Section, elset=_PickedSet2, orientation=Ori-1, material=HTMAT
,
*End Instance
**
*Elset, elset=HTEL, instance=PPSPLATE-1, generate
     1,  11664,      1
*Nset, nset=Set-15, instance=PPSPLATE-1, generate
    1,  3025,     1
*Elset, elset=Set-15, instance=PPSPLATE-1, generate
    1,  2916,     1
*Nset, nset=_PickedSet26, internal, instance=PPSPLATE-1, generate
     1,  15125,      1
*Elset, elset=_PickedSet26, internal, instance=PPSPLATE-1, generate
     1,  11664,      1
*Elset, elset=_Conv_S6, internal, instance=PPSPLATE-1, generate
     1,  11611,     54
*Elset, elset=_Conv_S3, internal, instance=PPSPLATE-1
    1,    2,    3,    4,    5,    6
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*Elset, elset=_Conv_S4, internal, instance=PPSPLATE-1, generate
    54,  11664,     54
*Elset, elset=_Conv_S5, internal, instance=PPSPLATE-1
  2863,  2864,  2865,  2866,  2867,  2868
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*Elset, elset=_Conv_S1, internal, instance=PPSPLATE-1, generate
  8749,  11664,      1
*Surface, type=ELEMENT, name=Conv
_Conv_S6, S6
_Conv_S3, S3
_Conv_S4, S4
_Conv_S5, S5
_Conv_S1, S1
*Elset, elset=_offbedC_S2, internal, instance=PPSPLATE-1, generate
    1,  2916,     1
*Elset, elset=_offbedC_S6, internal, instance=PPSPLATE-1, generate
     1,  11611,     54
*Elset, elset=_offbedC_S3, internal, instance=PPSPLATE-1
    1,    2,    3,    4,    5,    6
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*Elset, elset=_offbedC_S4, internal, instance=PPSPLATE-1, generate
    54,  11664,     54
*Elset, elset=_offbedC_S5, internal, instance=PPSPLATE-1
  2863,  2864,  2865,  2866,  2867,  2868
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*Elset, elset=_offbedC_S1, internal, instance=PPSPLATE-1, generate
  8749,  11664,      1
*Surface, type=ELEMENT, name=offbedC
_offbedC_S2, S2
_offbedC_S6, S6
_offbedC_S4, S4
_offbedC_S3, S3
_offbedC_S5, S5
_offbedC_S1, S1
*Element Progressive Activation, name=ElementProgressiveActivation1, elset=HTEL
*End Assembly
**
** MATERIALS
**
*Material, name=HTMAT
*Density
1270.,
*User Material, constants=7, type=THERMAL
 0.7018, 0.0041, 0.3913, 0.0011, 59.228, 2.8543, 0.3768
**
** PHYSICAL CONSTANTS
**
*Physical Constants, absolute zero=0., stefan boltzmann=5.67e-08
*Parameter table type, name="ABQ_AM_MaterialDeposition", parameters=2
STRING,,"Event series",,,
STRING,,"Deposition process",,"Roller|Bead"
*Parameter table type, name="ABQ_AM_MaterialDeposition_Advanced", parameters=6
STRING,"Partial","Activation type",,"Full|Partial"
FLOAT,0.,"Min volume fraction threshold for partial activation",,,
FLOAT,0.,"Max volume fraction threshold for partial activation",,,
FLOAT,0.,"Max volume fraction threshold for full activation",,,
STRING,"Yes","Orientation for bead type deposition",,,
INTEGER,0,"Element subdivision order",,,
*Parameter table type, name="ABQ_AM_MaterialDeposition_Bead", parameters=5
STRING,,"Stack direction",,"X|Y|Z"
FLOAT,0.,"Bead height",,,
FLOAT,0.,"Bead width",,,
FLOAT,0.,"Activation offset",,,
STRING,,"Deposition position",,"Below|Above"
*Table collection, name="ABQ_AM.Material Input"
*Parameter Table, type="ABQ_AM_MaterialDeposition" ,label="ABQ_AM_MaterialDeposition"
"Event series-1", Bead
*Parameter Table, type="ABQ_AM_MaterialDeposition_Advanced" ,label="ABQ_AM_MaterialDeposition_Advanced"
Partial, 0., 1., 1., Yes, 0
*Parameter Table, type="ABQ_AM_MaterialDeposition_Bead" ,label="ABQ_AM_MaterialDeposition_Bead"
Z, 0.0013, 0.0047, 0., Above
**
** PREDEFINED FIELDS
**
** Name: Predefined Field-1   Type: Temperature
*Initial Conditions, type=TEMPERATURE
_PickedSet26, 573.15
**
** EVENT SERIES TYPE
**
*Event series type, name="ABQ_AM_HeatSourceTrajectory_RuleID", fields=1
"Rule ID"
**
** EVENT SERIES TYPE
**
*Event series type, name="ABQ_AM_MaterialDeposition", fields=1
"On/Off State"
**
** EVENT SERIES TYPE
**
*Event series type, name="ABQ_AM_PowerMagnitude", fields=1
"Power Magnitude (unit of JT^-1)"
**
** EVENT SERIES DATA
**
*Event series, name="Event series-1", type="ABQ_AM_MaterialDeposition"
0.,0.,0.00235,0.,1.
6.2275,0.12455,0.00235,0.,1.
6.4625,0.12455,0.00705,0.,1.
12.5725,0.00235,0.00705,0.,1.
12.8075,0.00235,0.01175,0.,1.
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343.315,0.12455,0.1269,0.0013,1.
** ----------------------------------------------------------------
**
** STEP: PRINTING
**
*Step, name=PRINTING, nlgeom=NO, inc=100000
*Heat Transfer, end=PERIOD, deltmx=100.
0.1, 344., 1e-05, 1.,
**
** BOUNDARY CONDITIONS
**
** Name: BC-1 Type: Temperature
*Boundary
Set-15, 11, 11, 473.15
**
** INTERACTIONS
**
** Interaction: Int-1
*Film
HTEL, FFS, 298.15, 30.
** Interaction: Int-2
*Radiate
HTEL, RFS, 298.15, 0.97
**
** OUTPUT REQUESTS
**
*Restart, write, frequency=0
**
** FIELD OUTPUT: F-Output-1
**
*Output, field
*Node Output
NT,
*Element Output, directions=YES
TEMP,
**
** HISTORY OUTPUT: H-Output-1
**
*Output, history
*Radiation Output
FTEMP,
*Activate elements, activation=ElementProgressiveActivation1, expansion time constant=2.
"ABQ_AM.Material Input"
*End Step
** ----------------------------------------------------------------
**
** STEP: ONBed
**
*Step, name=ONBed, nlgeom=NO, inc=10000
*Heat Transfer, end=PERIOD, deltmx=100.
1., 300., 1e-05, 5.,
**
** INTERACTIONS
**
** Interaction: Int-3
*Film
HTEL, FFS, 298.15, 30.
** Interaction: Int-4
*Radiate
HTEL, RFS, 298.15, 0.97
**
** OUTPUT REQUESTS
**
*Restart, write, frequency=0
**
** FIELD OUTPUT: F-Output-1
**
*Output, field
*Node Output
NT,
*Element Output, directions=YES
TEMP,
**
** HISTORY OUTPUT: H-Output-1
**
*Output, history
*Radiation Output
FTEMP,
*End Step
** ----------------------------------------------------------------
**
** STEP: OFFBed
**
*Step, name=OFFBed, nlgeom=NO, inc=100000
*Heat Transfer, end=PERIOD, deltmx=100.
0.1, 600., 1e-05, 5.,
**
** BOUNDARY CONDITIONS
**
** Name: BC-1 Type: Temperature
*Boundary, op=NEW
**
** INTERACTIONS
**
** Interaction: Int-5
*Film
HTEL, FFS, 298.15, 10.
** Interaction: Int-6
*Radiate
HTEL, RFS, 298.15, 0.97
**
** OUTPUT REQUESTS
**
*Restart, write, frequency=0
**
** FIELD OUTPUT: F-Output-1
**
*Output, field
*Node Output
NT,
*Element Output, directions=YES
TEMP,
**
** HISTORY OUTPUT: H-Output-1
**
*Output, history
*Radiation Output
FTEMP,
*End Step
